K := 1023
E := 1
k := 0 .. K
σ := 0.5
N := 100
n := 0 .. N
X1 := rnorm(K + 1, E, σ)
E1 := mean(X1)
R[n] := 1*sum((X1[k] - E1)*(X1[k] - E1), k = 0 .. K)/(K - n + 1)
R[0] = 0.235907
RC[n] := R[n]/var(X1)
RC[0] = 1
corr(X1, X1) = 1
cvar(X1, X1) = 0.235907
