K := 1023
E := 1
k := 0 .. K
σ := 0.7
N := 200
n := 0 .. N
X1 := rexp(K + 1, σ)
E1 := mean(X1)
R[n] := 1*sum((X1[k] - E1)*(X1[k] - E1), k = 0 .. K)/(K - n + 1)
R[0] = 2.04686
RC[n] := R[n]/var(X1)
RC[0] = 1
corr(X1, X1) = 1
cvar(X1, X1) = 2.04686
