bin := 30
N := 1000
X := rnorm(N, 0, 1)
lower := floor(min(X))
n := 0 .. 10000
upper := ceil(max(X))
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j := 0 .. bin
h := (upper - lower)/bin
int[j] := lower + h*j
f := hist(int, X)/(N*h)
hist(bin, X)
F1 := hist(bin, X)
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