bin := 30
N := 1000
X := rnorm(N, 0, 1)
lower := floor(min(X))
n := 0 .. 10000
upper := ceil(max(X))
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j := 0 .. bin
h := (upper - lower)/bin
int[j] := lower + h*j
f := hist(int, X)/(N*h)
hist(bin, X)
F1 := hist(bin, X)
N := 1000
X := rlnorm(N, 1, 0.2)
F1 := hist(60, X)
j := 1
k := 1 .. 59
Φ := sum(F1[j], j = 0 .. 59)
FR1[k] := sum(F1[j], j = 1 .. k)
FR[k] := FR1[k]/Φ
□ □ dlnorm(N, 1, 0.2)
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skew(X) = 0.668027
kurt(X) = 0.81316
