k := 0, 1 .. 1023
А := 3
T := 200
m := 10
Δt := 1
K := 2^m
φ[k] := rnd(k + 1)/(k + 1)*π/6
n := 1.45
X1[k] := A*sin(φ[k] + 2*π*(k*0.3)^n*Δt/T)
Y := CFFT(X1)
j := 0 .. K - 1
F := ICFFT(Y)
Ω[j] := j/K
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